# set up the pressure
# Let f be the magnitude of the LAMMPS force variable using real units (kcal / Angstrom-mol).
variable p1 equal  0.01791576     # Force equivalent to 501 bar
variable p2 equal  -0.00003576  # Force equivalent to    1 bar

# System setup
atom_style  full
units   real
dimension 3
boundary p p p
neighbor        2.0 bin
neigh_modify	every 1 delay 0 check yes
timestep 1.0

#read_restart    piston_500_tmp.restart.30000000
# Define interaction parameters
pair_style      hybrid lj/charmm/coul/long 9.0 12.0 12.0 tersoff
bond_style      hybrid harmonic
angle_style     hybrid harmonic
dihedral_style  hybrid harmonic opls
improper_style  none
kspace_style    pppm 1.0e-4
special_bonds    lj/coul 0.0 0.0 0.5

# Read/analyze init geometry
read_data      ETH75.data
include        System_ethanol_water_coeff.in


# Defining the groups

group wall    type 12
group ethanol type 13 14 15 16 17 19
group water   type 18 20
group polymer type 1 2 3 4 5 6 7 8 9 10 11
group          piston1   id 6791:7934
group          piston2   id 7935:9078
group bothpistons  union piston1 piston2
group solvents   union water ethanol
fix            fshake   water   shake 0.000001 2000 0 b 22 a 36


group fixmematoms id 4976	4980	4985	5862	4984	4982	4981	4979	5853	4130	4102	4975	4973	4113	1793	1807	1806	1800	1798	1799	1797	1794	1796	1805	1801	1804	1795	5863	5859	1815	1816	1817	3339	3342	3343	3352	3334	3333	3335	3332	3331	3326	3329	3327	3328	3360	3330	1792	1791	1789	1788	1820	1787	1790	1786	2152	6531	3184	3174	3183	6538	6542	6539	6540	3175	3176	6541	3177	3151	3152	3161	3182	3181	3169	3166	3180	3170	3165	3171	3162	3163	3179	3178	1881	1879	1888	1880	1889	3172	2153	2143	2155	2150	2148	2154	2149	2151	2147	2144	2146	2145	2156	2142	2159	2140	2141	2139	2162	2136	2160	2138	2137	2168	2169	2170	3173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


group membrane_atoms     subtract all bothpistons solvents


group membrane1_free subtract membrane_atoms fixmematoms


# Defining group of atoms in Nose-Hoover thermostat
group thermostat_target union solvents membrane1_free piston1 piston2


# --------------balance the CPU load-----------------
balance 1.0 shift xyz 20 1.1
fix 21 all balance 100000 1.0 shift xyz 20 1.1 out tmp.balance

# -------------initialization-----------------
fix freezemem fixmematoms setforce 0.0 0.0 0.0
velocity fixmematoms set 0.0 0.0 0.0 units box

# ------------- Equilibration ----------------
fix pistonkeep bothpistons setforce 0.0 0.0 NULL


fix piston1thrust piston1 aveforce NULL NULL ${p1}
fix piston2thrust piston2 aveforce NULL NULL ${p2}

fix NVTequilib thermostat_target nvt temp 300 300 $(100.0*dt)

thermo_style custom step vol temp  enthalpy
restart 1000000 piston_500_tmp.restart
dump 1 all custom 10000 Filt_et75_50ns.lammpstrj id mol type type q xu yu zu vx vy vz fx fy fz ix iy iz

log piston_500.log
thermo 1000
run     25000000
write_data 75et_25ns.data
